// COMSOL Multiphysics 6.0.0.312 model "2D Vinsome.mph"
// Outline of the model tree

Parameters
  rho_s = 2600[kg/m^3]
  rho_w = 1000[kg/m^3]
  c_s = 1040[J/kg/K]
  c_w = 4000[J/kg/K]
  poro = 0.25
  lam = 2.2[W/m/K]
  H = 10[m]
  Q = 0.0075[m^3/s]
  T0 = 14.8[degC]
  Tw = 25.8[degC]
  hT = 1.296[W/m^2/K]
  L = 5000[m]
  H2 = 100[m]  // 100[m]
  T1 = T0  // 12[degC]
  poro_r = 0.15
  rho_r = 2600[kg/m^3]
  c_r = 1040[J/kg/K]
  lam2 = 2.2[W/m/K]
  r_well = 0.25[m]

Variables
  var1 "Variables 1"
    rhoc = (1 - poro)*rho_s*c_s + poro*rho_w*c_w
    qw = Q/2/pi/r/H
    d = if(t<eps,0[m],sqrt(lam/rhoc*t)/2)
    rhoc2 = (1 - poro_r)*rho_r*c_r + poro_r*rho_w*c_w
    kapa_rock = lam2/rhoc2
    vin_T0 = if((r>0),T0,Tw)
  var2 "Variables 2"
    qwr = qw*rho_w*c_w
    qwz = 0[W/(m^2*K)]

Geometry
  geom1 "Geometry 1" (2D axisymmetric, length unit m)
    r1: Rectangle | pos = {r_well, 0}; size = {L, H}
    fin: Finalize "Form Union"

Physics
  g: GeneralFormPDE on all domains
    dependent variable T
    Units.DependentVariableQuantity = none
    Units.CustomDependentVariableUnit = K
    Units.CustomSourceTermUnit = W/m^3
    gfeq1: GeneralFormPDE (default)
      f = -qwr*d(T,r)-qwz*d(T,z)+1/r*lam*Tr+rhoc*(prev(T,1)-T)/timestep
      Ga = {-lam*Tr, -lam*Tz}
      da = 0
    zflx1: ZeroFluxBoundary "Zero Flux 1" (default)
    init1: init "Initial Values 1" (default) | T = T0
    dir1: DirichletBoundary "Dirichlet Boundary Condition 1" on boundaries 1 | r = Tw
    dir2: DirichletBoundary "Dirichlet Boundary Condition 2" on boundaries 4 | r = T0
    flux1: FluxBoundary "Flux/Source 1" on boundaries 3 | g = -if(t<eps,0,lam2*((T-vin_T0)/d-pd/d))
  bode: BoundaryODE "pd" on boundaries 3
    dependent variable pd
    Units.DependentVariableQuantity = temperature
    Units.SourceTermQuantity = temperature
    dode1: DistributedODE (default)
      f = pd-(kapa_rock*timestep*(T-vin_T0)+d*prev((T-vin_T0)*d+pd*d+2*qd2*d,1)-d^4*(T-prev(T,1))/kapa_rock/timestep)/(3*d^2+kapa_rock*timestep)
      da = 0
    init1: init "Initial Values 1" (default)
  bode2: BoundaryODE "qd2" on boundaries 3
    dependent variable qd2
    Units.DependentVariableQuantity = temperature
    Units.SourceTermQuantity = temperature
    dode1: DistributedODE (default) | f = qd2-1/2*(2*pd-(T-vin_T0)+d^2*(T-prev(T,1))/kapa_rock/timestep); da = 0
    init1: init "Initial Values 1" (default)

Mesh
  mesh2 "Mesh 2"
    size: MeshSizeDefault | hmax = 335; hmin = 1.5; hcurve = 0.3; hgrad = 1.3
    dis1: Distribution on boundaries 2, 3
      type = explicit
      explicit = 0,0.00005,0.00011,0.00017,0.00023,0.00029,0.00035,0.00042,0.00048,0.00055,0.00063,0.00070,0.00078,0.00086,0.00094,0.00102,0.00111,0.00120,0.00130,0.00139,0.00149,0.00160,0.00170,0.00181,0.00192,0.00204,0.00216,0.00229,0.00242,0.00255,0.00269,0.00283,0.00297,0.00313,0.00328,0.00344,0.00361,0.00378,0.00396,0.00415,0.00434,0.00453,0.00473,0.00494,0.00516,0.00538,0.00561,0.00585,0.00610,0.00635,0.00661,0.00688,0.00716,0.00745,0.00775,0.00806,0.00838,0.00870,0.00904,0.00940,0.00976,0.01013,0.01052,0.01091,0.01133,0.01175,0.01219,0.01265,0.01312,0.01360,0.01410,0.01462,0.01515,0.01570,0.01627,0.01685,0.01746,0.01809,0.01874,0.01940,0.02009,0.02081,0.02155,0.02230,0.02308,0.02390,0.02473,0.02560,0.02649,0.02741,0.02837,0.02935,0.03036,0.03141,0.03249,0.03361,0.03477,0.03596,0.03719,0.03847,0.03979,0.04115,0.04255,0.04399,0.04548,0.04703,0.04863,0.05027,0.05197,0.05290,0.05472,0.05659,0.05853,0.06053,0.06260,0.06473,0.06692,0.06921,0.07156,0.07398,0.07649,0.07909,0.08175,0.08452,0.08737,0.09031,0.09336,0.09650,0.09975,0.10068,0.10413,0.10770,0.11140,0.11521,0.11914,0.12321,0.12742,0.13177,0.13625,0.14087,0.14565,0.15058,0.15568,0.16096,0.16640,0.17202,0.17782,0.18382,0.19001,0.19093,0.19753,0.20436,0.21140,0.21861,0.22615,0.23390,0.24186,0.25015,0.25876,0.26758,0.27662,0.28609,0.29589,0.30590,0.31623,0.32699,0.33808,0.34949,0.36132,0.36225,0.37484,0.38787,0.40121,0.41509,0.42952,0.44426,0.45954,0.47537,0.49162,0.50841,0.52584,0.54382,0.56233,0.58148,0.60129,0.62174,0.64283,0.66468,0.68717,0.68810,0.71210,0.73685,0.76247,0.78895,0.81628,0.84448,0.87365,0.90378,0.93478,0.96685,1.00000
      reverse = on
    dis2: Distribution on boundaries 1, 4
      type = explicit
      explicit = 0, 0.0625, 0.125, 0.25, 0.5,1,2,4,6,8,10
      reverse = on
    map1: Map "Mapped 1" on remaining entities

Studies
  std1 "Study 1"
    discr: TimeDiscrete | tunit = a; tlist = 0,1,2,3,4,5,10,20; usertol = on; rtol = 0.00001

Solver configurations
  sol1 "Solution 1" (study std1)
    v1: Variables "Dependent Variables 1" | scalemethod = init
    td1: TimeDiscrete "Time-Discrete Solver 1" | tlist = 0,1,2,3,4,5,10,20; timestepdiscrete = 1000000; prevlevels = 1
      dDef: Direct
      fc1: FullyCoupled | linsolver = dDef; maxiter = 20; jtech = once

Datasets
  dset1: Solution | solution = sol1

Plots
  pg1: PlotGroup2D "2D Plot Group 1" | data = dset1
    surf1: Surface | data = dset1; expr = T
  pg2: PlotGroup1D "1D Plot Group 2" | data = dset1
    lngr1: LineGraph "vinsome" on boundaries 2 | data = dset1; expr = T; xdata = reversedarc

Exports
  data1: Data
    data = dset1
    expr = T
    unit = degC
    filename = C:\Users\soga's student\Desktop\Kecheng\Geothermal\for_LBNL_data\2D Vinsome output.txt